*Heading
** Job name: Concrete_Impact_Height_2050mm Model name: Test_Concrete_Impact
** Generated by: Abaqus/CAE 2021
*Preprint, echo=NO, model=NO, history=NO, contact=NO
**
** PARTS
**
*Part, name=Part-4
*Node
      1,        -375.,           0.,         335.
      2,        -305.,           0.,         335.
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*Element, type=C3D8R
 1,  120, 1279, 1315,   97,    1,   85,   90,    4
 2, 1279, 1280, 1316, 1315,   85,   86,   89,   90
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*Nset, nset=Set-1, generate
    1,  5670,     1
*Elset, elset=Set-1, generate
    1,  3608,     1
** Section: Section-2
*Solid Section, elset=Set-1, material=Concrete
,
*End Part
**
*Part, name=Part-5
*Node
      1,           0.,        -37.5,         600.
      2,           0.,           0.,         600.
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*Element, type=C3D8R
  1, 215, 216, 636, 621,  11,  12, 185, 184
  2, 216,  14, 186, 636,  12,   1,  13, 185
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*Nset, nset=Set-1, generate
   1,  837,    1
*Elset, elset=Set-1, generate
   1,  600,    1
** Section: Section-1
*Solid Section, elset=Set-1, material=Steel
,
*End Part
**
**
** ASSEMBLY
**
*Assembly, name=Assembly
**
*Instance, name=Part-4-1, part=Part-4
*End Instance
**
*Instance, name=Part-5-1, part=Part-5
          0.,        2075.,         375.
          0.,        2075.,         375., -1.00000001268805,        2075.,         375., 89.9999992730282
*End Instance
**
*Nset, nset=Set-1, instance=Part-4-1
    1,    4,    5,    8,   10,   12
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*Elset, elset=Set-1, instance=Part-4-1
    1,    5,    9,   13,   17,   21
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*End Assembly
**
** MATERIALS
**
*Material, name=Concrete
*Density
 2.5e-09,
*Elastic
 41907.3, 0.2
*Concrete Damaged Plasticity
35.,  0.1, 1.16, 0.66,   0.
*Concrete Compression Hardening
 102.102,          0.
 110.617,  0.00011043
 117.466,    0.000197
 117.822, 0.000205391
    120., 0.000336538
 96.8558,  0.00118881
 75.3216,  0.00195266
 58.8072,  0.00259673
 46.7899,  0.00313349
 38.0287,  0.00359255
 31.5268,   0.0039977
 26.5963,  0.00436535
  23.007,  0.00468413
 20.1298,   0.0049859
  15.358,  0.00563353
*Concrete Tension Stiffening
7.,0.
*Concrete Compression Damage
       0.,          0.
       0.,  0.00011043
       0.,    0.000197
       0., 0.000205391
       0., 0.000336538
 0.192868,  0.00118881
  0.37232,  0.00195266
  0.50994,  0.00259673
 0.610084,  0.00313349
 0.683094,  0.00359255
 0.737277,   0.0039977
 0.778364,  0.00436535
 0.808275,  0.00468413
 0.832251,   0.0049859
*Concrete Failure, TYPE=Strain
0,0.00563,0,0.87201
*Material, name=Steel
*Density
 7.925e-09,
*Elastic
208000., 0.3
**
** INTERACTION PROPERTIES
**
*Surface Interaction, name=IntProp-1
*Friction
0.,
*Surface Behavior, pressure-overclosure=HARD
**
** BOUNDARY CONDITIONS
**
** Name: BC-1 Type: Symmetry/Antisymmetry/Encastre
*Boundary
Set-1, PINNED
**
** INTERACTIONS
**
** Interaction: Int-1
*Contact, op=NEW
*Contact Inclusions, ALL EXTERIOR
*Contact Property Assignment
 ,  , IntProp-1
** ----------------------------------------------------------------
**
** STEP: Step-1
**
*Step, name=Step-1, nlgeom=YES
*Dynamic, Explicit
, 1.
*Bulk Viscosity
0.06, 1.2
**
** LOADS
**
** Name: Load-1   Type: Gravity
*Dload
, GRAV, 9810., 0., -1., 0.
**
** OUTPUT REQUESTS
**
*Restart, write, number interval=1, time marks=NO
**
** FIELD OUTPUT: F-Output-1
**
*Output, field, time interval=0.001
*Node Output
A, RF, U, V
*Element Output, directions=YES
DAMAGEC, DAMAGET, EVF, LE, PE, PEEQ, PEEQVAVG, PEVAVG, S, STATUS, SVAVG
*Contact Output
CSTRESS,
**
** HISTORY OUTPUT: H-Output-1
**
*Output, history, variable=PRESELECT
*End Step
